// COMSOL Multiphysics 6.3.0.309 model "water_purification_reactor.mph"
// Water Purification Reactor
// This example simulates the turbulent flow field in a simplified water purification reactor.
// Outline of the model tree

Parameters
  u_in = 0.1[m/s]  // Inlet velocity

Geometry
  geom1 "Geometry 1" (3D, length unit m)
    blk1: Block | size = {5, 2, 1}
    cyl1: Cylinder | r = 0.2; h = 0.5; pos = {-0.5, 1, 0.5}; axistype = x
    cyl2: Cylinder | r = 0.2; h = 0.5; pos = {5, 1, 0.5}; axistype = x
    blk2: Block | size = {0.1, 1, 1}; pos = {0.95, 1, 0}
    blk3: Block | size = {0.1, 1, 1}; pos = {2.95, 1, 0}
    blk4: Block | size = {0.1, 1, 1}; pos = {1.95, 0, 0}
    blk5: Block | size = {0.1, 1, 1}; pos = {3.95, 0, 0}
    dif1: Difference | input = blk1; input2 = blk2, blk3, blk4, blk5
    uni1: Union | input = cyl1, cyl2, dif1; face = all
    blk6: Block | size = {6, 2, 0.5}; pos = {-0.5, 0, 0.5}
    dif2: Difference | input = uni1; input2 = blk6
    fin: Finalize "Form Union"

Materials
  mat1: Common "Water, liquid" on all domains
    def: def "Basic"
      thermalexpansioncoefficient = alpha_p(T)
      bulkviscosity = muB(T)
      dynamicviscosity = eta(T)
      ratioofspecificheat = gamma_w(T)
      electricconductivity = 5.5e-6[S/m]
      heatcapacity = Cp(T)
      density = rho(T)
      thermalconductivity = k(T)
      soundspeed = cs(T)
      eta: Piecewise
        arg = T
        pieces = 
          {273.15, 413.15, 1.3799566804-0.021224019151*T^1+1.3604562827E-4*T^2-4.6454090319E-7*T^3+8.9042735735E-10*T^4-9.0790692686E-13*T^5+3.8457331488E-16*T^6}
          {413.15, 553.75, 0.00401235783-2.10746715E-5*T^1+3.85772275E-8*T^2-2.39730284E-11*T^3}
        argunit = K
        fununit = Pa*s
      Cp: Piecewise | arg = T; pieces = {273.15, 553.75, 12010.1471-80.4072879*T^1+0.309866854*T^2-5.38186884E-4*T^3+3.62536437E-7*T^4}; argunit = K; fununit = J/(kg*K)
      rho: Piecewise
        arg = T
        smooth = contd1
        pieces = 
          {273.15, 293.15, 6.3092789034e-05*T^3-0.0603676398829*T^2+18.9229382407066*T-950.704055329848}
          {293.15, 373.15, 1.0335053319e-05*T^3-0.0133950656345*T^2+4.96928883266*T+432.257114008512}
        argunit = K
        fununit = kg/m^3
      k: Piecewise | arg = T; pieces = {273.15, 553.75, -0.869083936+0.00894880345*T^1-1.58366345E-5*T^2+7.97543259E-9*T^3}; argunit = K; fununit = W/(m*K)
      cs: Interpolation
        funcnametable = {cs, 1}
        table = {{273, 1403}, {278, 1427}, {283, 1447}, {293, 1481}, {303, 1507}, {313, 1526}, {323, 1541}, {333, 1552}, {343, 1555}, {353, 1555}, {363, 1550}, {373, 1543}}
        interp = piecewisecubic
        fununit = m/s
        argunit = K
      an1: Analytic | funcname = alpha_p; expr = -1/rho(T)*d(rho(T),T); args = T; fununit = 1/K; argunit = K
      an2: Analytic | funcname = gamma_w; expr = 1+(T/Cp(T))*(alpha_p(T)*cs(T))^2; args = T; fununit = 1; argunit = K
      an3: Analytic | funcname = muB; expr = 2.79*eta(T); args = T; fununit = Pa*s; argunit = K

Physics
  spf: TurbulentFlowkeps "Turbulent Flow, k-ε" on all domains
    dependent variable u = {u, v, w}
    fp1: FluidProperties (default)
    init1: init "Initial Values 1" (default)
    wallbc1: WallBC "Wall 1" (default)
    inl1: InletBoundary "Inlet 1" on boundaries 1 | BoundaryCondition = FullyDevelopedFlow; Uavfdf = u_in
    sym1: Symmetry on boundaries 3
    out1: OutletBoundary "Outlet 1" on boundaries 28

Mesh
  mesh1 "Mesh 1"
    size: MeshSizeDefault
      table = cfd
      hmax = 0.13000
      hmin = 0.038000
      hcurve = 0.800
      hnarrow = 0.5
      hgrad = 1.25
      hauto = 7
      custom = on
    size1: Size on boundaries 1, 3, 28 | table = cfd; hmin = 0.019960; hauto = 7; custom = on
    size2: Size (disabled) on boundaries 2, 4-27
      table = cfd
      hmax = 0.067000
      hmin = 0.019960
      hcurve = 0.6
      hnarrow = 0.7
      hgrad = 1.15
      custom = on
    cr1: CornerRefinement on domains 1 | boundary = boundaries 2, 4-27
    ftet1: FreeTet "Free Tetrahedral 1" on remaining entities | optcurved = on
    bl1: BndLayer "Boundary Layers 1" on domains 1 | sharpcorners = trim
      blp1: BndLayerProp "Boundary Layer Properties 1" on boundaries 2, 4-27 | blnlayers = 2; blhminfact = 6

Studies
  std1 "Study 1"
    stat: Stationary

Solver configurations
  sol1 "Solution 1" (study std1)
    v1: Variables "Dependent Variables 1"
    s1: Stationary "Stationary Solver 1"
      se1: Segregated
        ss1: SegregatedStep "Velocity u, Pressure p"
        ss2: SegregatedStep "Turbulence Variables"
        ll1: LowerLimit
      d1: Direct "Direct, fluid flow variables (spf)"
      d2: Direct "Direct, turbulence variables (spf)"

Datasets
  dset1: Solution | solution = sol1
  surf1: Surface "Exterior Walls" on boundaries 2, 4-27 | data = dset1
  surf2: Surface on boundaries 1, 3, 28 | data = dset1

Plots
  pg1: PlotGroup3D "Velocity (spf)" | data = surf2; title = Velocity field
    slc1: Slice (disabled) | expr = spf.U
    surf1: Surface | data = surf1; expr = spf.U
    surf2: Surface | expr = spf.U
    arws1: ArrowSurface | expr = {u, v, w}; arrowcount = 300; arrowlength = logarithmic
  pg2: PlotGroup3D "Pressure (spf)" | data = surf1
    surf1: Surface | expr = p
      tran1: Transparency
  pg3: PlotGroup3D "Wall Resolution (spf)" | data = surf1
    surf1: Surface "Wall Resolution" | expr = spf.Delta_wPlus
  pg4: PlotGroup3D "Streamlines"
    data = dset1
    title = Streamlines colored by velocity, width proportional to turbulent viscosity
    surf1: Surface | data = surf1; expr = spf.U
    str1: Streamline on boundaries 1
      expr = {u, v, w}
      selnumber = 45
      linetype = ribbon
      widthexpr = spf.nuT*1[s/m]
      widthscale = 100
      col1: Color "Color Expression 1" | expr = spf.U